// SBML level 3 version 1

model main()

  // Compartments:
  compartment default = 1;

  // Species:
  species DBP in default = 0.3701207;
  species ROR in default = 0.1590691;
  species BMAL1 in default = 0.9320167;
  species NFIL3 in default = 0.4922372;
  species REV_ERB in default = 0.5860506;
  species PER in default = 0.1233366;
  species CRY in default = 0.4077304;
  species AMPK in default = 0.561751;
  species FBXL3 in default = 0.8255094;
  species FBXL21 in default = 0.9904186;
  species CREB in default = 0.6559931;
  species TGF_beta in default = 0.3103395;
  species COL2A in default = 0.7096719;
  species COL1A in default = 0.2625645;
  species ACAN in default = 0.53209;
  species TGFBRI in default = 0.508398;
  species IGF1 in default = 0.6688714;
  species IGF1R in default = 0.9189098;
  species GDF5 in default = 0.01961067;
  species IL_10 in default = 0.7826366;
  species IL_10R1 in default = 0.503916;
  species IL_4 in default = 0.9114735;
  species IL_4R in default = 0.5836015;
  species IL_1beta in default = 0.7225441;
  species IL_1R1 in default = 0.1011701;
  species IL_6 in default = 0.2614304;
  species IL_6R in default = 0.7995664;
  species IL_17 in default = 0.5373444;
  species IL_17R in default = 0.1616711;
  species IL_1RA in default = 0.07264225;
  species IFN_gamma in default = 0.1870065;
  species IFN_gammaR in default = 0.9159781;
  species TNF in default = 0.06964398;
  species TNFR1 in default = 0.06675452;
  species ADAMTS4_5 in default = 0.531997;
  species MMP13 in default = 0.1220189;
  species MMP3 in default = 0.5554619;
  species VEGF in default = 0.03451909;
  species iNos in default = 0.9904814;
  species Cox2 in default = 0.3675078;
  species CCL3_4 in default = 0.3784421;
  species TIMP3 in default = 0.1690283;
  species CCN2 in default = 0.2206181;
  species NF_kB in default = 0.6972292;
  species p65 in default = 0.3231099;
  species IkBalpha in default = 0.1858633;
  species ERK in default = 0.1933644;
  species cJun in default = 0.03502279;
  species JNK in default = 0.3742583;
  species p38 in default = 0.7426935;
  species akt1 in default = 0.603851;
  species Sox9 in default = 0.1174981;
  species JAK in default = 0.009811659;
  species STAT1 in default = 0.3385758;
  species STAT3 in default = 0.1169166;
  species STAT4 in default = 0.3831151;
  species STAT6 in default = 0.1274842;
  species SMAD2_3 in default = 0.03568076;
  species SMAD1_5_8_4 in default = 0.4450527;
  species wnt5a in default = 0.9090581;
  species beta_catenin in default = 0.3299734;

  // Parameters:
  gamma = 1;
  h = 10;

  // Reactions:
  ROR_activates_DBP: ROR => DBP; (-exp(0.5*h) + exp(-h*(ROR - 0.5)))/((1 - exp(0.5*h))*(1 + exp(-h*(ROR - 0.5)))) - gamma*DBP;
  BMAL1_activates_ROR: BMAL1 => ROR; (-exp(0.5*h) + exp(-h*(BMAL1 - 0.5)))/((1 - exp(0.5*h))*(1 + exp(-h*(BMAL1 - 0.5)))) - gamma*ROR;
  NFIL3_activates_ROR: NFIL3 => ROR; (-exp(0.5*h) + exp(-h*(NFIL3 - 0.5)))/((1 - exp(0.5*h))*(1 + exp(-h*(NFIL3 - 0.5)))) - gamma*ROR;
  DBP_activates_BMAL1: DBP => BMAL1; (-exp(0.5*h) + exp(-h*(DBP - 0.5)))/((1 - exp(0.5*h))*(1 + exp(-h*(DBP - 0.5)))) - gamma*BMAL1;
  REV_ERB_activates_BMAL1: REV_ERB => BMAL1; (-exp(0.5*h) + exp(-h*(REV_ERB - 0.5)))/((1 - exp(0.5*h))*(1 + exp(-h*(REV_ERB - 0.5)))) - gamma*BMAL1;
  PER_activates_BMAL1: PER => BMAL1; (-exp(0.5*h) + exp(-h*(PER - 0.5)))/((1 - exp(0.5*h))*(1 + exp(-h*(PER - 0.5)))) - gamma*BMAL1;
  CRY_activates_BMAL1: CRY => BMAL1; (-exp(0.5*h) + exp(-h*(CRY - 0.5)))/((1 - exp(0.5*h))*(1 + exp(-h*(CRY - 0.5)))) - gamma*BMAL1;
  ROR_activates_NFIL3: ROR => NFIL3; (-exp(0.5*h) + exp(-h*(ROR - 0.5)))/((1 - exp(0.5*h))*(1 + exp(-h*(ROR - 0.5)))) - gamma*NFIL3;
  BMAL1_inhibits_PER: BMAL1 => -1 PER; (-exp(0.5*h) + exp(-h*(BMAL1 - 0.5)))/((1 - exp(0.5*h))*(1 + exp(-h*(BMAL1 - 0.5)))) - gamma*PER;
  BMAL1_inhibits_CRY: BMAL1 => -1 CRY; (-exp(0.5*h) + exp(-h*(BMAL1 - 0.5)))/((1 - exp(0.5*h))*(1 + exp(-h*(BMAL1 - 0.5)))) - gamma*CRY;
  CRY_inhibits_AMPK: CRY => -1 AMPK; (-exp(0.5*h) + exp(-h*(CRY - 0.5)))/((1 - exp(0.5*h))*(1 + exp(-h*(CRY - 0.5)))) - gamma*AMPK;
  AMPK_activates_FBXL3: AMPK => FBXL3; (-exp(0.5*h) + exp(-h*(AMPK - 0.5)))/((1 - exp(0.5*h))*(1 + exp(-h*(AMPK - 0.5)))) - gamma*FBXL3;
  CRY_inhibits_FBXL21: CRY => -1 FBXL21; (-exp(0.5*h) + exp(-h*(CRY - 0.5)))/((1 - exp(0.5*h))*(1 + exp(-h*(CRY - 0.5)))) - gamma*FBXL21;
  FBXL3_inhibits_FBXL21: FBXL3 => -1 FBXL21; (-exp(0.5*h) + exp(-h*(FBXL3 - 0.5)))/((1 - exp(0.5*h))*(1 + exp(-h*(FBXL3 - 0.5)))) - gamma*FBXL21;
  PER_activates_CREB: PER => CREB; (-exp(0.5*h) + exp(-h*(PER - 0.5)))/((1 - exp(0.5*h))*(1 + exp(-h*(PER - 0.5)))) - gamma*CREB;
  ERK_activates_TGFBRI: ERK => TGFBRI; (-exp(0.5*h) + exp(-h*(ERK - 0.5)))/((1 - exp(0.5*h))*(1 + exp(-h*(ERK - 0.5)))) - gamma*TGFBRI;
  Sox9_activates_TGFBRI: Sox9 => TGFBRI; (-exp(0.5*h) + exp(-h*(Sox9 - 0.5)))/((1 - exp(0.5*h))*(1 + exp(-h*(Sox9 - 0.5)))) - gamma*TGFBRI;
  SMAD2_3_activates_TGFBRI: SMAD2_3 => TGFBRI; (-exp(0.5*h) + exp(-h*(SMAD2_3 - 0.5)))/((1 - exp(0.5*h))*(1 + exp(-h*(SMAD2_3 - 0.5)))) - gamma*TGFBRI;
  IGF1R_activates_IGF1: IGF1R => IGF1; (-exp(0.5*h) + exp(-h*(IGF1R - 0.5)))/((1 - exp(0.5*h))*(1 + exp(-h*(IGF1R - 0.5)))) - gamma*IGF1;
  ERK_activates_IGF1R: ERK => IGF1R; (-exp(0.5*h) + exp(-h*(ERK - 0.5)))/((1 - exp(0.5*h))*(1 + exp(-h*(ERK - 0.5)))) - gamma*IGF1R;
  akt1_activates_IGF1R: akt1 => IGF1R; (-exp(0.5*h) + exp(-h*(akt1 - 0.5)))/((1 - exp(0.5*h))*(1 + exp(-h*(akt1 - 0.5)))) - gamma*IGF1R;
  COL2A_activates_GDF5: COL2A => GDF5; (-exp(0.5*h) + exp(-h*(COL2A - 0.5)))/((1 - exp(0.5*h))*(1 + exp(-h*(COL2A - 0.5)))) - gamma*GDF5;
  ACAN_activates_GDF5: ACAN => GDF5; (-exp(0.5*h) + exp(-h*(ACAN - 0.5)))/((1 - exp(0.5*h))*(1 + exp(-h*(ACAN - 0.5)))) - gamma*GDF5;
  wnt5a_inhibits_GDF5: wnt5a => -1 GDF5; (-exp(0.5*h) + exp(-h*(wnt5a - 0.5)))/((1 - exp(0.5*h))*(1 + exp(-h*(wnt5a - 0.5)))) - gamma*GDF5;
  TNFR1_activates_TNF: TNFR1 => TNF; (-exp(0.5*h) + exp(-h*(TNFR1 - 0.5)))/((1 - exp(0.5*h))*(1 + exp(-h*(TNFR1 - 0.5)))) - gamma*TNF;
  NF_kB_activates_TNF: NF_kB => TNF; (-exp(0.5*h) + exp(-h*(NF_kB - 0.5)))/((1 - exp(0.5*h))*(1 + exp(-h*(NF_kB - 0.5)))) - gamma*TNF;
  JNK_activates_TNF: JNK => TNF; (-exp(0.5*h) + exp(-h*(JNK - 0.5)))/((1 - exp(0.5*h))*(1 + exp(-h*(JNK - 0.5)))) - gamma*TNF;
  p38_activates_TNF: p38 => TNF; (-exp(0.5*h) + exp(-h*(p38 - 0.5)))/((1 - exp(0.5*h))*(1 + exp(-h*(p38 - 0.5)))) - gamma*TNF;
  COL2A_inhibits_TNF: COL2A => -1 TNF; (-exp(0.5*h) + exp(-h*(COL2A - 0.5)))/((1 - exp(0.5*h))*(1 + exp(-h*(COL2A - 0.5)))) - gamma*TNF;
  ACAN_inhibits_TNF: ACAN => -1 TNF; (-exp(0.5*h) + exp(-h*(ACAN - 0.5)))/((1 - exp(0.5*h))*(1 + exp(-h*(ACAN - 0.5)))) - gamma*TNF;
  IL_17R_activates_TNFR1: IL_17R => TNFR1; (-exp(0.5*h) + exp(-h*(IL_17R - 0.5)))/((1 - exp(0.5*h))*(1 + exp(-h*(IL_17R - 0.5)))) - gamma*TNFR1;
  p65_activates_TNFR1: p65 => TNFR1; (-exp(0.5*h) + exp(-h*(p65 - 0.5)))/((1 - exp(0.5*h))*(1 + exp(-h*(p65 - 0.5)))) - gamma*TNFR1;
  ERK_activates_TNFR1: ERK => TNFR1; (-exp(0.5*h) + exp(-h*(ERK - 0.5)))/((1 - exp(0.5*h))*(1 + exp(-h*(ERK - 0.5)))) - gamma*TNFR1;
  cJun_activates_TNFR1: cJun => TNFR1; (-exp(0.5*h) + exp(-h*(cJun - 0.5)))/((1 - exp(0.5*h))*(1 + exp(-h*(cJun - 0.5)))) - gamma*TNFR1;
  p38_activates_TNFR1: p38 => TNFR1; (-exp(0.5*h) + exp(-h*(p38 - 0.5)))/((1 - exp(0.5*h))*(1 + exp(-h*(p38 - 0.5)))) - gamma*TNFR1;
  wnt5a_activates_TNFR1: wnt5a => TNFR1; (-exp(0.5*h) + exp(-h*(wnt5a - 0.5)))/((1 - exp(0.5*h))*(1 + exp(-h*(wnt5a - 0.5)))) - gamma*TNFR1;
  IGF1_activates_MMP13: IGF1 => MMP13; (-exp(0.5*h) + exp(-h*(IGF1 - 0.5)))/((1 - exp(0.5*h))*(1 + exp(-h*(IGF1 - 0.5)))) - gamma*MMP13;
  IGF1_activates_MMP3: IGF1 => MMP3; (-exp(0.5*h) + exp(-h*(IGF1 - 0.5)))/((1 - exp(0.5*h))*(1 + exp(-h*(IGF1 - 0.5)))) - gamma*MMP3;
  ADAMTS4_5_activates_p65: ADAMTS4_5 => p65; (-exp(0.5*h) + exp(-h*(ADAMTS4_5 - 0.5)))/((1 - exp(0.5*h))*(1 + exp(-h*(ADAMTS4_5 - 0.5)))) - gamma*p65;
  CCL3_4_activates_ERK: CCL3_4 => ERK; (-exp(0.5*h) + exp(-h*(CCL3_4 - 0.5)))/((1 - exp(0.5*h))*(1 + exp(-h*(CCL3_4 - 0.5)))) - gamma*ERK;
  SMAD2_3_activates_ERK: SMAD2_3 => ERK; (-exp(0.5*h) + exp(-h*(SMAD2_3 - 0.5)))/((1 - exp(0.5*h))*(1 + exp(-h*(SMAD2_3 - 0.5)))) - gamma*ERK;
  TGF_beta_activates_cJun: TGF_beta => cJun; (-exp(0.5*h) + exp(-h*(TGF_beta - 0.5)))/((1 - exp(0.5*h))*(1 + exp(-h*(TGF_beta - 0.5)))) - gamma*cJun;
  COL2A_activates_cJun: COL2A => cJun; (-exp(0.5*h) + exp(-h*(COL2A - 0.5)))/((1 - exp(0.5*h))*(1 + exp(-h*(COL2A - 0.5)))) - gamma*cJun;
  ACAN_activates_cJun: ACAN => cJun; (-exp(0.5*h) + exp(-h*(ACAN - 0.5)))/((1 - exp(0.5*h))*(1 + exp(-h*(ACAN - 0.5)))) - gamma*cJun;
  TGFBRI_activates_cJun: TGFBRI => cJun; (-exp(0.5*h) + exp(-h*(TGFBRI - 0.5)))/((1 - exp(0.5*h))*(1 + exp(-h*(TGFBRI - 0.5)))) - gamma*cJun;
  IL_1R1_activates_cJun: IL_1R1 => cJun; (-exp(0.5*h) + exp(-h*(IL_1R1 - 0.5)))/((1 - exp(0.5*h))*(1 + exp(-h*(IL_1R1 - 0.5)))) - gamma*cJun;
  ADAMTS4_5_activates_cJun: ADAMTS4_5 => cJun; (-exp(0.5*h) + exp(-h*(ADAMTS4_5 - 0.5)))/((1 - exp(0.5*h))*(1 + exp(-h*(ADAMTS4_5 - 0.5)))) - gamma*cJun;
  MMP3_activates_cJun: MMP3 => cJun; (-exp(0.5*h) + exp(-h*(MMP3 - 0.5)))/((1 - exp(0.5*h))*(1 + exp(-h*(MMP3 - 0.5)))) - gamma*cJun;
  TIMP3_activates_cJun: TIMP3 => cJun; (-exp(0.5*h) + exp(-h*(TIMP3 - 0.5)))/((1 - exp(0.5*h))*(1 + exp(-h*(TIMP3 - 0.5)))) - gamma*cJun;
  COL1A_inhibits_cJun: COL1A => -1 cJun; (-exp(0.5*h) + exp(-h*(COL1A - 0.5)))/((1 - exp(0.5*h))*(1 + exp(-h*(COL1A - 0.5)))) - gamma*cJun;
  IL_1beta_inhibits_cJun: IL_1beta => -1 cJun; (-exp(0.5*h) + exp(-h*(IL_1beta - 0.5)))/((1 - exp(0.5*h))*(1 + exp(-h*(IL_1beta - 0.5)))) - gamma*cJun;
  IL_6_inhibits_cJun: IL_6 => -1 cJun; (-exp(0.5*h) + exp(-h*(IL_6 - 0.5)))/((1 - exp(0.5*h))*(1 + exp(-h*(IL_6 - 0.5)))) - gamma*cJun;
  IL_17_inhibits_cJun: IL_17 => -1 cJun; (-exp(0.5*h) + exp(-h*(IL_17 - 0.5)))/((1 - exp(0.5*h))*(1 + exp(-h*(IL_17 - 0.5)))) - gamma*cJun;
  IL_17R_inhibits_cJun: IL_17R => -1 cJun; (-exp(0.5*h) + exp(-h*(IL_17R - 0.5)))/((1 - exp(0.5*h))*(1 + exp(-h*(IL_17R - 0.5)))) - gamma*cJun;
  TNF_inhibits_cJun: TNF => -1 cJun; (-exp(0.5*h) + exp(-h*(TNF - 0.5)))/((1 - exp(0.5*h))*(1 + exp(-h*(TNF - 0.5)))) - gamma*cJun;
  TNFR1_inhibits_cJun: TNFR1 => -1 cJun; (-exp(0.5*h) + exp(-h*(TNFR1 - 0.5)))/((1 - exp(0.5*h))*(1 + exp(-h*(TNFR1 - 0.5)))) - gamma*cJun;
  IL_1R1_activates_JNK: IL_1R1 => JNK; (-exp(0.5*h) + exp(-h*(IL_1R1 - 0.5)))/((1 - exp(0.5*h))*(1 + exp(-h*(IL_1R1 - 0.5)))) - gamma*JNK;
  ERK_activates_JNK: ERK => JNK; (-exp(0.5*h) + exp(-h*(ERK - 0.5)))/((1 - exp(0.5*h))*(1 + exp(-h*(ERK - 0.5)))) - gamma*JNK;
  MMP13_inhibits_JNK: MMP13 => -1 JNK; (-exp(0.5*h) + exp(-h*(MMP13 - 0.5)))/((1 - exp(0.5*h))*(1 + exp(-h*(MMP13 - 0.5)))) - gamma*JNK;
  CREB_activates_p38: CREB => p38; (-exp(0.5*h) + exp(-h*(CREB - 0.5)))/((1 - exp(0.5*h))*(1 + exp(-h*(CREB - 0.5)))) - gamma*p38;
  IL_1R1_activates_p38: IL_1R1 => p38; (-exp(0.5*h) + exp(-h*(IL_1R1 - 0.5)))/((1 - exp(0.5*h))*(1 + exp(-h*(IL_1R1 - 0.5)))) - gamma*p38;
  MMP3_activates_p38: MMP3 => p38; (-exp(0.5*h) + exp(-h*(MMP3 - 0.5)))/((1 - exp(0.5*h))*(1 + exp(-h*(MMP3 - 0.5)))) - gamma*p38;
  CREB_activates_akt1: CREB => akt1; (-exp(0.5*h) + exp(-h*(CREB - 0.5)))/((1 - exp(0.5*h))*(1 + exp(-h*(CREB - 0.5)))) - gamma*akt1;
  Sox9_activates_akt1: Sox9 => akt1; (-exp(0.5*h) + exp(-h*(Sox9 - 0.5)))/((1 - exp(0.5*h))*(1 + exp(-h*(Sox9 - 0.5)))) - gamma*akt1;
  MMP13_inhibits_akt1: MMP13 => -1 akt1; (-exp(0.5*h) + exp(-h*(MMP13 - 0.5)))/((1 - exp(0.5*h))*(1 + exp(-h*(MMP13 - 0.5)))) - gamma*akt1;
  MMP3_inhibits_akt1: MMP3 => -1 akt1; (-exp(0.5*h) + exp(-h*(MMP3 - 0.5)))/((1 - exp(0.5*h))*(1 + exp(-h*(MMP3 - 0.5)))) - gamma*akt1;
  ACAN_activates_Sox9: ACAN => Sox9; (-exp(0.5*h) + exp(-h*(ACAN - 0.5)))/((1 - exp(0.5*h))*(1 + exp(-h*(ACAN - 0.5)))) - gamma*Sox9;
  STAT6_activates_JAK: STAT6 => JAK; (-exp(0.5*h) + exp(-h*(STAT6 - 0.5)))/((1 - exp(0.5*h))*(1 + exp(-h*(STAT6 - 0.5)))) - gamma*JAK;
  VEGF_activates_STAT3: VEGF => STAT3; (-exp(0.5*h) + exp(-h*(VEGF - 0.5)))/((1 - exp(0.5*h))*(1 + exp(-h*(VEGF - 0.5)))) - gamma*STAT3;
  iNos_activates_STAT3: iNos => STAT3; (-exp(0.5*h) + exp(-h*(iNos - 0.5)))/((1 - exp(0.5*h))*(1 + exp(-h*(iNos - 0.5)))) - gamma*STAT3;
  akt1_activates_STAT3: akt1 => STAT3; (-exp(0.5*h) + exp(-h*(akt1 - 0.5)))/((1 - exp(0.5*h))*(1 + exp(-h*(akt1 - 0.5)))) - gamma*STAT3;
  STAT1_activates_STAT3: STAT1 => STAT3; (-exp(0.5*h) + exp(-h*(STAT1 - 0.5)))/((1 - exp(0.5*h))*(1 + exp(-h*(STAT1 - 0.5)))) - gamma*STAT3;
  IL_4R_activates_STAT6: IL_4R => STAT6; (-exp(0.5*h) + exp(-h*(IL_4R - 0.5)))/((1 - exp(0.5*h))*(1 + exp(-h*(IL_4R - 0.5)))) - gamma*STAT6;
  beta_catenin_activates_wnt5a: beta_catenin => wnt5a; (-exp(0.5*h) + exp(-h*(beta_catenin - 0.5)))/((1 - exp(0.5*h))*(1 + exp(-h*(beta_catenin - 0.5)))) - gamma*wnt5a;
  TNFR1_inhibits_wnt5a: TNFR1 => -1 wnt5a; (-exp(0.5*h) + exp(-h*(TNFR1 - 0.5)))/((1 - exp(0.5*h))*(1 + exp(-h*(TNFR1 - 0.5)))) - gamma*wnt5a;
  MMP13_inhibits_wnt5a: MMP13 => -1 wnt5a; (-exp(0.5*h) + exp(-h*(MMP13 - 0.5)))/((1 - exp(0.5*h))*(1 + exp(-h*(MMP13 - 0.5)))) - gamma*wnt5a;
  MMP3_inhibits_wnt5a: MMP3 => -1 wnt5a; (-exp(0.5*h) + exp(-h*(MMP3 - 0.5)))/((1 - exp(0.5*h))*(1 + exp(-h*(MMP3 - 0.5)))) - gamma*wnt5a;
  NF_kB_inhibits_wnt5a: NF_kB => -1 wnt5a; (-exp(0.5*h) + exp(-h*(NF_kB - 0.5)))/((1 - exp(0.5*h))*(1 + exp(-h*(NF_kB - 0.5)))) - gamma*wnt5a;
  p65_inhibits_wnt5a: p65 => -1 wnt5a; (-exp(0.5*h) + exp(-h*(p65 - 0.5)))/((1 - exp(0.5*h))*(1 + exp(-h*(p65 - 0.5)))) - gamma*wnt5a;
end
